# Лабораторная работа 1, вариант 16
F(x) := ln(x)^(9/5)
x0 := 5
x1 := 8
x2 := 11
A(x) := F(x0)*(x - x1)*(x - x2)/((x0 - x1)*(x0 - x2))
B(x) := F(x1)*(x - x0)*(x - x2)/((x1 - x0)*(x1 - x2))
C(x) := F(x2)*(x - x0)*(x - x1)/((x2 - x0)*(x2 - x1))
L2(x) := A(x) + B(x) + C(x)
F(9.5) = 4.30901
L2(9.5) = 4.31714
|F(9.5) - L2(9.5)| = 0.00813557
x := 5, 5.1 .. 11
# [plot: L2(x), F(x) vs x]
F3(x) := d^3/dx^3(F(x))
x := 5, 5.1 .. 11
# [plot: |F3(x)| vs x]
M3 := |F3(5)|
M3 = 0.00941967
R2(x) := M3/3!*|(x - x0)*(x - x1)*(x - x2)|
R2(9.5) = 0.0158957
