# Лабораторная работа №2, вариант 16
x0 := 0.271
y0 := 1.86638
x1 := 0.273
y1 := 1.87499
x2 := 0.275
y2 := 1.88365
x3 := 0.277
y3 := 1.89234
x4 := 0.279
y4 := 1.90169
h := x1 - x0 = 0.002
# Нахождение 1-й производной
f'(x0) := 1/(6*h)*(-11*y0 + 18*y1 - 9*y2 + 2*y3) = 4.28917
f'(x1) := 1/(6*h)*(-2*y0 - 3*y1 + 6*y2 - y3) = 4.31917
f'(x2) := 1/(6*h)*(y0 - 6*y1 + 3*y2 + 2*y3) = 4.33917
f'(x3) := 1/(6*h)*(-2*y0 + 9*y1 - 18*y2 + 11*y3) = 4.34917
# Нахождение 2-й производной
f''(x0) := 1/h^2*(2*y0 - 5*y1 + 4*y2 - y3) = 17.5
f''(x1) := 1/h^2*(y0 - 2*y1 + y2) = 12.5
f''(x2) := 1/h^2*(y1 - 2*y2 + y3) = 7.5
f''(x3) := 1/h^2*(-y0 + 4*y1 - 5*y2 + 2*y3) = 2.5
